<Node name="root" dt="1e-3" gravity="0 0 0">

    <RequiredPlugin pluginName='SofaBoundaryCondition'/>
    <RequiredPlugin name="ROS2Plugin"/>

    <EulerImplicitSolver name="ODEsolver" rayleighStiffness="0.1" rayleighMass="0.1"/>
    <CGLinearSolver iterations="100" tolerance="1e-5" threshold="1e-5"/>

    <Node name="Point">
        <MechanicalObject name="DOFs" template="Vec3d" showObject="true"/>
        <LinearMovementConstraint
                template="Vec3d"
                keyTimes="0 5 10"
                movements="0 0 0
                           1 0 0
                           2 0 0"/>
    </Node>

    <Node name="Pose">
        <MechanicalObject name="DOFs" template="Rigid3d" showObject="true"/>
        <LinearMovementConstraint
                template="Rigid3d"
                keyTimes="0 5 10"
                movements="0 0 0 0 0 0
                           0 1 0 0 0 0
                           0 2 0 0 0 0 "/>
    </Node>

    <Node name="ROS2">
        <ROS2Context name="ros2Context"/>
        <ROS2Publisher name="point_pub"
                       template="RosVec3d"
                       nodeName="point_publisher"
                       topicName="sofa/point"
                       canPublish="true"
                       input="@../Point/DOFs.position"/>
        <ROS2Subscriber name="point_sub"
                        template="RosVec3d"
                        nodeName="point_subscriber"
                        topicName="sofa/point"/>

        <ROS2Publisher name="string_pub"
                       template="RosString"
                       nodeName="point_publisher"
                       topicName="sofa/string"
                       canPublish="true"
                       input=" Hi it\'s me ! "/>
        <ROS2Subscriber name="string_sub"
                        template="RosString"
                        nodeName="point_subscriber"
                        topicName="sofa/string"/>


        <ROS2Publisher name="byteArray_pub"
                       template="RosByteArray"
                       nodeName="point_publisher"
                       topicName="sofa/byteArray"
                       canPublish="true"
                       input="0 1 2 3 5 4 3 2"/>
        <ROS2Subscriber name="byteArray_sub"
                        template="RosByteArray"
                        nodeName="point_subscriber"
                        topicName="sofa/byteArray"/>


        <ROS2Publisher name="point_pub_array"
                       template="RosVec3dArray"
                       nodeName="point_publisher"
                       topicName="sofa/pointArray"
                       canPublish="true"
                       input="@../Point/DOFs.position"/>
        <ROS2Subscriber name="point_sub_array"
                        template="RosVec3dArray"
                        nodeName="point_subscriber"
                        topicName="sofa/pointArray"/>
        <ROS2Publisher name="pose_pub"
                       template="RosRigid"
                       nodeName="pose_publisher"
                       topicName="sofa/pose"
                       canPublish="true"
                       input="@../Pose/DOFs.position"/>
        <ROS2Subscriber name="pose_sub"
                        template="RosRigid"
                        nodeName="pose_subscriber"
                        topicName="sofa/pose"/>
        <ROS2Publisher name="double_pub"
                       template="RosDouble"
                       nodeName="RosDouble"
                       topicName="sofa/double"
                       canPublish="true"
                       input="@../ODEsolver.rayleighStiffness"/>
    </Node>
</Node>
